<?xml version="1.0" encoding="utf-8"?>
<neuroml xmlns="http://www.neuroml.org/schema/neuroml2" xmlns:xsi="http://www.w3.org/2001/XMLSchema-instance" id="Adex2pop_1comp_test1" xsi:schemaLocation="http://www.neuroml.org/schema/neuroml2  https://raw.githubusercontent.com/NeuroML/NeuroML2/development/Schemas/NeuroML2/NeuroML_v2beta4.xsd">
   <include href="pyr_23layer.cell.nml"/>
   <include href="basket_inter.cell.nml"/>
   <include href="g_exp.synapse.nml"/>
   <network id="Adex2pop_1comp_test1">
      <population component="pyr_23layer" id="pop1" size="1" type="populationList">
         <instance id="0">
            <location x="696.469186" y="286.139335" z="773.148546"/>
         </instance>
      </population>
      <population component="basket_inter" id="pop2" size="1" type="populationList">
         <instance id="0">
            <location x="551.314769" y="719.468970" z="576.893540"/>
         </instance>
      </population>
      <projection id="0" postsynapticPopulation="pop2" presynapticPopulation="pop1" synapse="g_exp">
         <connection id="0" postCellId="../pop2/0/basket_inter" postSegmentId="0" preCellId="../pop1/0/pyr_23layer" preSegmentId="0"/>
      </projection>
      <projection id="1" postsynapticPopulation="pop1" presynapticPopulation="pop2" synapse="g_exp">
         <connection id="0" postCellId="../pop1/0/pyr_23layer" postSegmentId="0" preCellId="../pop2/0/basket_inter" preSegmentId="0"/>
      </projection>
   </network>
</neuroml>
