<?xml version="1.0" encoding="utf-8"?>
<neuroml xmlns="http://www.neuroml.org/schema/neuroml2" xmlns:xsi="http://www.w3.org/2001/XMLSchema-instance" id="Adex2pop_2comp" xsi:schemaLocation="http://www.neuroml.org/schema/neuroml2  https://raw.githubusercontent.com/NeuroML/NeuroML2/development/Schemas/NeuroML2/NeuroML_v2beta4.xsd">
   <network id="Adex2pop_2comp">
      <population component="pyr_23layer" id="0">
         <instance id="0">
            <location x="17.411730" y="33.848517" z="13.136440"/>
         </instance>
         <instance id="1">
            <location x="57.153483" y="78.461136" z="5.419006"/>
         </instance>
         <instance id="2">
            <location x="105.671286" y="54.786379" z="11.228555"/>
         </instance>
         <instance id="3">
            <location x="163.782869" y="38.474552" z="18.806442"/>
         </instance>
         <instance id="4">
            <location x="217.986724" y="31.369401" z="12.039115"/>
         </instance>
      </population>
      <population component="basket_inter" id="1">
         <instance id="0">
            <location x="18.449885" y="50.752077" z="13.540822"/>
         </instance>
         <instance id="1">
            <location x="79.562293" y="67.954544" z="12.764227"/>
         </instance>
         <instance id="2">
            <location x="104.386294" y="57.956426" z="15.434735"/>
         </instance>
         <instance id="3">
            <location x="163.288784" y="48.881881" z="14.125719"/>
         </instance>
         <instance id="4">
            <location x="213.295690" y="57.795471" z="7.380478"/>
         </instance>
      </population>
   </network>
</neuroml>
