<?xml version="1.0" encoding="utf-8"?>
<neuroml xmlns="http://www.neuroml.org/schema/neuroml2" xmlns:xsi="http://www.w3.org/2001/XMLSchema-instance" id="medium_net_g_exp" xsi:schemaLocation="http://www.neuroml.org/schema/neuroml2  https://raw.githubusercontent.com/NeuroML/NeuroML2/development/Schemas/NeuroML2/NeuroML_v2beta4.xsd">

   <include href="medium_net_g_exp_pop0.cell.nml"/>

   <include href="medium_net_g_exp_pop1.cell.nml"/>

   <include href="medium_net_g_exp_pop2.cell.nml"/>

   <include href="medium_net_g_exp_pop3.cell.nml"/>

   <include href="medium_net_g_exp_pop4.cell.nml"/>

   <include href="medium_net_g_exp_pop5.cell.nml"/>

   <include href="medium_net_g_exp.synapse.nml"/>

   <network id="medium_net_g_exp">

      <population component="medium_net_g_exp_pop0" id="pop1" size="42" type="populationList">

         <instance id="0">

            <location x="27.858767" y="126.914193" z="464.973502"/>

         </instance>

         <instance id="1">

            <location x="51.445573" y="165.930485" z="481.666001"/>

         </instance>

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
      </population>

      <population component="medium_net_g_exp_pop1" id="pop2" size="8" type="populationList">

         <instance id="0">

            <location x="130.301683" y="393.408644" z="464.483152"/>

         </instance>

         <instance id="1">

            <location x="382.574362" y="31.746316" z="536.199254"/>

         </instance>

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
      </population>

      <population component="medium_net_g_exp_pop2" id="pop3" size="31" type="populationList">

         <instance id="0">

            <location x="6.637515" y="48.897420" z="322.239692"/>

         </instance>

         <instance id="1">

            <location x="111.239918" y="80.559801" z="213.543848"/>

         </instance>

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
      </population>

      <population component="medium_net_g_exp_pop3" id="pop4" size="10" type="populationList">

         <instance id="0">

            <location x="95.007421" y="164.207914" z="379.061281"/>

         </instance>

         <instance id="1">

            <location x="283.881526" y="76.402782" z="337.712345"/>

         </instance>

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
      </population>

      <population component="medium_net_g_exp_pop4" id="pop5" size="10" type="populationList">

         <instance id="0">

            <location x="94.628765" y="310.864985" z="10.535452"/>

         </instance>

         <instance id="1">

            <location x="301.355439" y="18.358093" z="127.683352"/>

         </instance>

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
      </population>

      <population component="medium_net_g_exp_pop5" id="pop6" size="3" type="populationList">

         <instance id="0">

            <location x="323.392891" y="145.430527" z="116.180496"/>

         </instance>

         <instance id="1">

            <location x="969.019936" y="215.983974" z="64.177985"/>

         </instance>

         <instance id="2">

            <location x="1675.004981" y="227.241286" z="50.857231"/>

         </instance>

      </population>

      <projection id="projection_0" postsynapticPopulation="pop1" presynapticPopulation="pop1" synapse="g_exp_00">

         <connection id="0" postCellId="../pop1/1/medium_net_g_exp_pop0" postSegmentId="0" preCellId="../pop1/0/medium_net_g_exp_pop0" preSegmentId="0"/>

         <connection id="1" postCellId="../pop1/2/medium_net_g_exp_pop0" postSegmentId="0" preCellId="../pop1/0/medium_net_g_exp_pop0" preSegmentId="0"/>

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
      </projection>

      <projection id="projection_1" postsynapticPopulation="pop2" presynapticPopulation="pop1" synapse="g_exp_01">

         <connection id="0" postCellId="../pop2/0/medium_net_g_exp_pop1" postSegmentId="3" preCellId="../pop1/0/medium_net_g_exp_pop0" preSegmentId="0"/>

         <connection id="1" postCellId="../pop2/1/medium_net_g_exp_pop1" postSegmentId="2" preCellId="../pop1/0/medium_net_g_exp_pop0" preSegmentId="0"/>

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
      </projection>

      <projection id="projection_2" postsynapticPopulation="pop3" presynapticPopulation="pop1" synapse="g_exp_02">

         <connection id="0" postCellId="../pop3/0/medium_net_g_exp_pop2" postSegmentId="2" preCellId="../pop1/0/medium_net_g_exp_pop0" preSegmentId="0"/>

         <connection id="1" postCellId="../pop3/1/medium_net_g_exp_pop2" postSegmentId="2" preCellId="../pop1/0/medium_net_g_exp_pop0" preSegmentId="0"/>

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
      </projection>

      <projection id="projection_3" postsynapticPopulation="pop4" presynapticPopulation="pop1" synapse="g_exp_03">

         <connection id="0" postCellId="../pop4/0/medium_net_g_exp_pop3" postSegmentId="4" preCellId="../pop1/0/medium_net_g_exp_pop0" preSegmentId="0"/>

         <connection id="1" postCellId="../pop4/1/medium_net_g_exp_pop3" postSegmentId="3" preCellId="../pop1/0/medium_net_g_exp_pop0" preSegmentId="0"/>

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
      </projection>

      <projection id="projection_4" postsynapticPopulation="pop5" presynapticPopulation="pop1" synapse="g_exp_04">

         <connection id="0" postCellId="../pop5/0/medium_net_g_exp_pop4" postSegmentId="4" preCellId="../pop1/0/medium_net_g_exp_pop0" preSegmentId="0"/>

         <connection id="1" postCellId="../pop5/0/medium_net_g_exp_pop4" postSegmentId="6" preCellId="../pop1/0/medium_net_g_exp_pop0" preSegmentId="0"/>

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
      </projection>

      <projection id="projection_5" postsynapticPopulation="pop6" presynapticPopulation="pop1" synapse="g_exp_05">

         <connection id="0" postCellId="../pop6/0/medium_net_g_exp_pop5" postSegmentId="5" preCellId="../pop1/0/medium_net_g_exp_pop0" preSegmentId="0"/>

         <connection id="1" postCellId="../pop6/1/medium_net_g_exp_pop5" postSegmentId="1" preCellId="../pop1/0/medium_net_g_exp_pop0" preSegmentId="0"/>

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
      </projection>

      <projection id="projection_6" postsynapticPopulation="pop1" presynapticPopulation="pop2" synapse="g_exp_10">

         <connection id="0" postCellId="../pop1/0/medium_net_g_exp_pop0" postSegmentId="0" preCellId="../pop2/0/medium_net_g_exp_pop1" preSegmentId="0"/>

         <connection id="1" postCellId="../pop1/1/medium_net_g_exp_pop0" postSegmentId="0" preCellId="../pop2/0/medium_net_g_exp_pop1" preSegmentId="0"/>

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
      </projection>

      <projection id="projection_7" postsynapticPopulation="pop2" presynapticPopulation="pop2" synapse="g_exp_11">

         <connection id="0" postCellId="../pop2/1/medium_net_g_exp_pop1" postSegmentId="4" preCellId="../pop2/0/medium_net_g_exp_pop1" preSegmentId="0"/>

         <connection id="1" postCellId="../pop2/2/medium_net_g_exp_pop1" postSegmentId="2" preCellId="../pop2/0/medium_net_g_exp_pop1" preSegmentId="0"/>

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
      </projection>

      <projection id="projection_8" postsynapticPopulation="pop3" presynapticPopulation="pop2" synapse="g_exp_12">

         <connection id="0" postCellId="../pop3/0/medium_net_g_exp_pop2" postSegmentId="0" preCellId="../pop2/0/medium_net_g_exp_pop1" preSegmentId="0"/>

         <connection id="1" postCellId="../pop3/0/medium_net_g_exp_pop2" postSegmentId="0" preCellId="../pop2/0/medium_net_g_exp_pop1" preSegmentId="0"/>

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
      </projection>

      <projection id="projection_9" postsynapticPopulation="pop4" presynapticPopulation="pop2" synapse="g_exp_13">

         <connection id="0" postCellId="../pop4/0/medium_net_g_exp_pop3" postSegmentId="6" preCellId="../pop2/0/medium_net_g_exp_pop1" preSegmentId="0"/>

         <connection id="1" postCellId="../pop4/0/medium_net_g_exp_pop3" postSegmentId="6" preCellId="../pop2/0/medium_net_g_exp_pop1" preSegmentId="0"/>

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
      </projection>

      <projection id="projection_10" postsynapticPopulation="pop5" presynapticPopulation="pop2" synapse="g_exp_14">

         <connection id="0" postCellId="../pop5/0/medium_net_g_exp_pop4" postSegmentId="4" preCellId="../pop2/0/medium_net_g_exp_pop1" preSegmentId="0"/>

         <connection id="1" postCellId="../pop5/0/medium_net_g_exp_pop4" postSegmentId="0" preCellId="../pop2/0/medium_net_g_exp_pop1" preSegmentId="0"/>

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
      </projection>

      <projection id="projection_11" postsynapticPopulation="pop6" presynapticPopulation="pop2" synapse="g_exp_15">

         <connection id="0" postCellId="../pop6/0/medium_net_g_exp_pop5" postSegmentId="6" preCellId="../pop2/0/medium_net_g_exp_pop1" preSegmentId="0"/>

         <connection id="1" postCellId="../pop6/0/medium_net_g_exp_pop5" postSegmentId="3" preCellId="../pop2/0/medium_net_g_exp_pop1" preSegmentId="0"/>

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
      </projection>

      <projection id="projection_12" postsynapticPopulation="pop1" presynapticPopulation="pop3" synapse="g_exp_20">

         <connection id="0" postCellId="../pop1/0/medium_net_g_exp_pop0" postSegmentId="0" preCellId="../pop3/0/medium_net_g_exp_pop2" preSegmentId="0"/>

         <connection id="1" postCellId="../pop1/1/medium_net_g_exp_pop0" postSegmentId="0" preCellId="../pop3/0/medium_net_g_exp_pop2" preSegmentId="0"/>

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
      </projection>

      <projection id="projection_13" postsynapticPopulation="pop2" presynapticPopulation="pop3" synapse="g_exp_21">

         <connection id="0" postCellId="../pop2/0/medium_net_g_exp_pop1" postSegmentId="3" preCellId="../pop3/0/medium_net_g_exp_pop2" preSegmentId="0"/>

         <connection id="1" postCellId="../pop2/0/medium_net_g_exp_pop1" postSegmentId="2" preCellId="../pop3/1/medium_net_g_exp_pop2" preSegmentId="0"/>

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
      </projection>

      <projection id="projection_14" postsynapticPopulation="pop3" presynapticPopulation="pop3" synapse="g_exp_22">

         <connection id="0" postCellId="../pop3/1/medium_net_g_exp_pop2" postSegmentId="1" preCellId="../pop3/0/medium_net_g_exp_pop2" preSegmentId="0"/>

         <connection id="1" postCellId="../pop3/2/medium_net_g_exp_pop2" postSegmentId="2" preCellId="../pop3/0/medium_net_g_exp_pop2" preSegmentId="0"/>

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
      </projection>

      <projection id="projection_15" postsynapticPopulation="pop4" presynapticPopulation="pop3" synapse="g_exp_23">

         <connection id="0" postCellId="../pop4/0/medium_net_g_exp_pop3" postSegmentId="5" preCellId="../pop3/0/medium_net_g_exp_pop2" preSegmentId="0"/>

         <connection id="1" postCellId="../pop4/1/medium_net_g_exp_pop3" postSegmentId="4" preCellId="../pop3/0/medium_net_g_exp_pop2" preSegmentId="0"/>

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
      </projection>

      <projection id="projection_16" postsynapticPopulation="pop5" presynapticPopulation="pop3" synapse="g_exp_24">

         <connection id="0" postCellId="../pop5/0/medium_net_g_exp_pop4" postSegmentId="3" preCellId="../pop3/0/medium_net_g_exp_pop2" preSegmentId="0"/>

         <connection id="1" postCellId="../pop5/0/medium_net_g_exp_pop4" postSegmentId="2" preCellId="../pop3/0/medium_net_g_exp_pop2" preSegmentId="0"/>

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
      </projection>

      <projection id="projection_17" postsynapticPopulation="pop6" presynapticPopulation="pop3" synapse="g_exp_25">

         <connection id="0" postCellId="../pop6/0/medium_net_g_exp_pop5" postSegmentId="2" preCellId="../pop3/0/medium_net_g_exp_pop2" preSegmentId="0"/>

         <connection id="1" postCellId="../pop6/0/medium_net_g_exp_pop5" postSegmentId="5" preCellId="../pop3/1/medium_net_g_exp_pop2" preSegmentId="0"/>

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
      </projection>

      <projection id="projection_18" postsynapticPopulation="pop1" presynapticPopulation="pop4" synapse="g_exp_30">

         <connection id="0" postCellId="../pop1/0/medium_net_g_exp_pop0" postSegmentId="0" preCellId="../pop4/0/medium_net_g_exp_pop3" preSegmentId="0"/>

         <connection id="1" postCellId="../pop1/0/medium_net_g_exp_pop0" postSegmentId="0" preCellId="../pop4/0/medium_net_g_exp_pop3" preSegmentId="0"/>

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
      </projection>

      <projection id="projection_19" postsynapticPopulation="pop2" presynapticPopulation="pop4" synapse="g_exp_31">

         <connection id="0" postCellId="../pop2/0/medium_net_g_exp_pop1" postSegmentId="1" preCellId="../pop4/0/medium_net_g_exp_pop3" preSegmentId="0"/>

         <connection id="1" postCellId="../pop2/0/medium_net_g_exp_pop1" postSegmentId="2" preCellId="../pop4/0/medium_net_g_exp_pop3" preSegmentId="0"/>

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
      </projection>

      <projection id="projection_20" postsynapticPopulation="pop3" presynapticPopulation="pop4" synapse="g_exp_32">

         <connection id="0" postCellId="../pop3/0/medium_net_g_exp_pop2" postSegmentId="0" preCellId="../pop4/0/medium_net_g_exp_pop3" preSegmentId="0"/>

         <connection id="1" postCellId="../pop3/1/medium_net_g_exp_pop2" postSegmentId="0" preCellId="../pop4/0/medium_net_g_exp_pop3" preSegmentId="0"/>

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
      </projection>

      <projection id="projection_21" postsynapticPopulation="pop4" presynapticPopulation="pop4" synapse="g_exp_33">

         <connection id="0" postCellId="../pop4/1/medium_net_g_exp_pop3" postSegmentId="2" preCellId="../pop4/0/medium_net_g_exp_pop3" preSegmentId="0"/>

         <connection id="1" postCellId="../pop4/2/medium_net_g_exp_pop3" postSegmentId="3" preCellId="../pop4/0/medium_net_g_exp_pop3" preSegmentId="0"/>

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
      </projection>

      <projection id="projection_22" postsynapticPopulation="pop5" presynapticPopulation="pop4" synapse="g_exp_34">

         <connection id="0" postCellId="../pop5/0/medium_net_g_exp_pop4" postSegmentId="3" preCellId="../pop4/0/medium_net_g_exp_pop3" preSegmentId="0"/>

         <connection id="1" postCellId="../pop5/0/medium_net_g_exp_pop4" postSegmentId="0" preCellId="../pop4/0/medium_net_g_exp_pop3" preSegmentId="0"/>

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
      </projection>

      <projection id="projection_23" postsynapticPopulation="pop6" presynapticPopulation="pop4" synapse="g_exp_35">

         <connection id="0" postCellId="../pop6/0/medium_net_g_exp_pop5" postSegmentId="6" preCellId="../pop4/0/medium_net_g_exp_pop3" preSegmentId="0"/>

         <connection id="1" postCellId="../pop6/0/medium_net_g_exp_pop5" postSegmentId="6" preCellId="../pop4/0/medium_net_g_exp_pop3" preSegmentId="0"/>

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
      </projection>

      <projection id="projection_24" postsynapticPopulation="pop1" presynapticPopulation="pop5" synapse="g_exp_40">

         <connection id="0" postCellId="../pop1/0/medium_net_g_exp_pop0" postSegmentId="0" preCellId="../pop5/0/medium_net_g_exp_pop4" preSegmentId="0"/>

         <connection id="1" postCellId="../pop1/1/medium_net_g_exp_pop0" postSegmentId="0" preCellId="../pop5/0/medium_net_g_exp_pop4" preSegmentId="0"/>

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
      </projection>

      <projection id="projection_25" postsynapticPopulation="pop2" presynapticPopulation="pop5" synapse="g_exp_41">

         <connection id="0" postCellId="../pop2/0/medium_net_g_exp_pop1" postSegmentId="2" preCellId="../pop5/0/medium_net_g_exp_pop4" preSegmentId="0"/>

         <connection id="1" postCellId="../pop2/1/medium_net_g_exp_pop1" postSegmentId="5" preCellId="../pop5/0/medium_net_g_exp_pop4" preSegmentId="0"/>

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
      </projection>

      <projection id="projection_26" postsynapticPopulation="pop3" presynapticPopulation="pop5" synapse="g_exp_42">

         <connection id="0" postCellId="../pop3/0/medium_net_g_exp_pop2" postSegmentId="3" preCellId="../pop5/0/medium_net_g_exp_pop4" preSegmentId="0"/>

         <connection id="1" postCellId="../pop3/1/medium_net_g_exp_pop2" postSegmentId="1" preCellId="../pop5/0/medium_net_g_exp_pop4" preSegmentId="0"/>

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
      </projection>

      <projection id="projection_27" postsynapticPopulation="pop4" presynapticPopulation="pop5" synapse="g_exp_43">

         <connection id="0" postCellId="../pop4/0/medium_net_g_exp_pop3" postSegmentId="5" preCellId="../pop5/0/medium_net_g_exp_pop4" preSegmentId="0"/>

         <connection id="1" postCellId="../pop4/1/medium_net_g_exp_pop3" postSegmentId="2" preCellId="../pop5/0/medium_net_g_exp_pop4" preSegmentId="0"/>

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
      </projection>

      <projection id="projection_28" postsynapticPopulation="pop5" presynapticPopulation="pop5" synapse="g_exp_44">

         <connection id="0" postCellId="../pop5/1/medium_net_g_exp_pop4" postSegmentId="4" preCellId="../pop5/0/medium_net_g_exp_pop4" preSegmentId="0"/>

         <connection id="1" postCellId="../pop5/1/medium_net_g_exp_pop4" postSegmentId="7" preCellId="../pop5/0/medium_net_g_exp_pop4" preSegmentId="0"/>

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
      </projection>

      <projection id="projection_29" postsynapticPopulation="pop6" presynapticPopulation="pop5" synapse="g_exp_45">

         <connection id="0" postCellId="../pop6/0/medium_net_g_exp_pop5" postSegmentId="5" preCellId="../pop5/0/medium_net_g_exp_pop4" preSegmentId="0"/>

         <connection id="1" postCellId="../pop6/1/medium_net_g_exp_pop5" postSegmentId="3" preCellId="../pop5/0/medium_net_g_exp_pop4" preSegmentId="0"/>

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
      </projection>

      <projection id="projection_30" postsynapticPopulation="pop5" presynapticPopulation="pop6" synapse="g_exp_54">

         <connection id="0" postCellId="../pop5/0/medium_net_g_exp_pop4" postSegmentId="7" preCellId="../pop6/0/medium_net_g_exp_pop5" preSegmentId="0"/>

         <connection id="1" postCellId="../pop5/1/medium_net_g_exp_pop4" postSegmentId="7" preCellId="../pop6/0/medium_net_g_exp_pop5" preSegmentId="0"/>

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
      </projection>

      <projection id="projection_31" postsynapticPopulation="pop6" presynapticPopulation="pop6" synapse="g_exp_55">

         <connection id="0" postCellId="../pop6/1/medium_net_g_exp_pop5" postSegmentId="6" preCellId="../pop6/0/medium_net_g_exp_pop5" preSegmentId="0"/>

         <connection id="1" postCellId="../pop6/2/medium_net_g_exp_pop5" postSegmentId="5" preCellId="../pop6/0/medium_net_g_exp_pop5" preSegmentId="0"/>

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
      </projection>

   </network>

</neuroml>
