<?xml version="1.0" encoding="utf-8"?>
<Lems>
   <Target component="sim1"/>
   <Include file="Cells.xml"/>
   <Include file="Networks.xml"/>
   <Include file="Simulation.xml"/>
   <Include file="Inputs.xml"/>
   <pulseGeneratorDL amplitude="15.000000" delay="20.000000ms" duration="180.000000ms" id="pulse0"/>
   <izhikevichCell a="0.020000" b="0.200000" c="-50.000000" d="2.000000" id="VERTEX_izhikevichCell_group_0" thresh="30.000000mV" v0="-70.000000mV"/>
   <network id="net1">
      <population component="VERTEX_izhikevichCell_group_0" id="pop0" size="1"/>
      <explicitInput destination="synapses" input="pulse0" target="pop0[0]"/>
   </network>
   <expOneSynapse erev="0.000000mV" gbase="10.000000nS" id="g_exp_00" tauDecay="2.000000ms"/>
   <Simulation id="sim1" length="300.000000ms" step="0.010000ms" target="net1">
      <Display id="d1" timeScale="1ms" title="Voltage traces and inputs of the VERTEX Izhikevich Cell(s) exported to LEMS" xmax="300.000000" xmin="0" ymax="100" ymin="-160">
         <Line color="#FF0000" id="Input_pop0_0" quantity="pop0[0]/pulse0/I" scale="1" timeScale="1ms"/>
         <Line color="#FF0000" id="v_pop0_0" quantity="pop0[0]/v" scale="1mV" timeScale="1ms"/>
      </Display>
      <OutputFile fileName="results/pointIzhikevichCell_stepI_test1_pop0.dat" id="of0">
         <OutputColumn id="pop00" quantity="pop0[0]/v"/>
      </OutputFile>
   </Simulation>
</Lems>
